**
*HEADING
L=1000mm, dia=386mm, T=14mm, fin length=280mm Py=275N/mm2 Moment=1kNm Axial = 2801.23251 kN 36x50 mesh (circ x length)
**
**
** Define Nodal Coordinates
** ------------------------
**
**
*NODE, NSET=END1
1, 193.0, 0.0, 0.0
2, 192.3, 16.8, 0.0
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*NODE, NSET=END2
10001, 193.0, 0.0, 1000.0
10002, 192.3, 16.8, 1000.0
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**
**
*NODE
3601, 193, 0, 360
6401, 193, 0, 640
13601, 268, 0, 360
16401, 268, 0, 640
23601, 343, 0, 360
26401, 343, 0, 640
**
**
*NSET, NSET=MIDDLE, GENERATE
5001, 5072, 1
**
**
**
**
*NSET, NSET=MID
5001
**
**
*NSET, GENERATE, NSET=LINE1
3601, 23601, 10000
**
**
*NSET, GENERATE, NSET=LINE2
6401, 26401, 10000
**
**
*NFILL, NSET=FPLATE
LINE1, LINE2, 28, 100
**
**
*ELEMENT, TYPE=S9R5
100000, 3601, 23601, 23801, 3801, 13601, 23701, 13801, 3701, 13701
**
**
*ELGEN, ELSET=FIN
100000, 14, 200, 1, 1, 1, 1
**
**
*NFILL, NSET=TUBE
END1, END2, 100, 100
**
**
***********   GENERATE ELEMENTS   ************
**
**
*ELEMENT, TYPE=S9R5
1, 1, 3, 203, 201, 2, 103, 202, 101, 102
36, 71, 1, 201, 271, 72, 101, 272, 171, 172
**
**
*ELGEN, ELSET=CHS
1, 35, 2, 1, 50, 200, 100
36, 1, 1, 1, 50, 200, 100
**
**
***********   DEFINING PROPERTIES   ************
*SHELLSECTION, ELSET=CHS, MATERIAL=STEEL
14
*SHELLSECTION, ELSET=FIN, MATERIAL=RIGID
10
**
**
***********   DEFINING MATERIALS   ************
**
**
*MATERIAL, NAME=STEEL
*ELASTIC, TYPE=ISO
210000, 0.3, 0
*PLASTIC
275, 0
278.1, 0.0099
495.9, 0.1397
516.6, 0.1817
455.5, 0.2617
*EXPANSION, ZERO=0
0, 0
**
**
*MATERIAL, NAME=RIGID
*ELASTIC, TYPE=ISO
21000000, 0.3, 0
**
**
***********   BOUNDARIES & CONSTRAINTS   ************
**
**
*BOUNDARY
END1, 1, 2
END2, 1, 2
MIDDLE, 3, 3
MID, 1, 1
**
**
**
**
*EQUATION
2
1, 3, 1, 2, 3, -1
2
2, 3, 1, 3, 3, -1
2
3, 3, 1, 4, 3, -1
2
4, 3, 1, 5, 3, -1
2
5, 3, 1, 6, 3, -1
2
6, 3, 1, 7, 3, -1
2
7, 3, 1, 8, 3, -1
2
8, 3, 1, 9, 3, -1
2
9, 3, 1, 10, 3, -1
2
10, 3, 1, 11, 3, -1
2
11, 3, 1, 12, 3, -1
2
12, 3, 1, 13, 3, -1
2
13, 3, 1, 14, 3, -1
2
14, 3, 1, 15, 3, -1
2
15, 3, 1, 16, 3, -1
2
16, 3, 1, 17, 3, -1
2
17, 3, 1, 18, 3, -1
2
18, 3, 1, 19, 3, -1
2
19, 3, 1, 20, 3, -1
2
20, 3, 1, 21, 3, -1
2
21, 3, 1, 22, 3, -1
2
22, 3, 1, 23, 3, -1
2
23, 3, 1, 24, 3, -1
2
24, 3, 1, 25, 3, -1
2
25, 3, 1, 26, 3, -1
2
26, 3, 1, 27, 3, -1
2
27, 3, 1, 28, 3, -1
2
28, 3, 1, 29, 3, -1
2
29, 3, 1, 30, 3, -1
2
30, 3, 1, 31, 3, -1
2
31, 3, 1, 32, 3, -1
2
32, 3, 1, 33, 3, -1
2
33, 3, 1, 34, 3, -1
2
34, 3, 1, 35, 3, -1
2
35, 3, 1, 36, 3, -1
2
36, 3, 1, 37, 3, -1
2
37, 3, 1, 38, 3, -1
2
38, 3, 1, 39, 3, -1
2
39, 3, 1, 40, 3, -1
2
40, 3, 1, 41, 3, -1
2
41, 3, 1, 42, 3, -1
2
42, 3, 1, 43, 3, -1
2
43, 3, 1, 44, 3, -1
2
44, 3, 1, 45, 3, -1
2
45, 3, 1, 46, 3, -1
2
46, 3, 1, 47, 3, -1
2
47, 3, 1, 48, 3, -1
2
48, 3, 1, 49, 3, -1
2
49, 3, 1, 50, 3, -1
2
50, 3, 1, 51, 3, -1
2
51, 3, 1, 52, 3, -1
2
52, 3, 1, 53, 3, -1
2
53, 3, 1, 54, 3, -1
2
54, 3, 1, 55, 3, -1
2
55, 3, 1, 56, 3, -1
2
56, 3, 1, 57, 3, -1
2
57, 3, 1, 58, 3, -1
2
58, 3, 1, 59, 3, -1
2
59, 3, 1, 60, 3, -1
2
60, 3, 1, 61, 3, -1
2
61, 3, 1, 62, 3, -1
2
62, 3, 1, 63, 3, -1
2
63, 3, 1, 64, 3, -1
2
64, 3, 1, 65, 3, -1
2
65, 3, 1, 66, 3, -1
2
66, 3, 1, 67, 3, -1
2
67, 3, 1, 68, 3, -1
2
68, 3, 1, 69, 3, -1
2
69, 3, 1, 70, 3, -1
2
70, 3, 1, 71, 3, -1
2
71, 3, 1, 72, 3, -1
2
10001, 3, 1, 10002, 3, -1
2
10002, 3, 1, 10003, 3, -1
2
10003, 3, 1, 10004, 3, -1
2
10004, 3, 1, 10005, 3, -1
2
10005, 3, 1, 10006, 3, -1
2
10006, 3, 1, 10007, 3, -1
2
10007, 3, 1, 10008, 3, -1
2
10008, 3, 1, 10009, 3, -1
2
10009, 3, 1, 10010, 3, -1
2
10010, 3, 1, 10011, 3, -1
2
10011, 3, 1, 10012, 3, -1
2
10012, 3, 1, 10013, 3, -1
2
10013, 3, 1, 10014, 3, -1
2
10014, 3, 1, 10015, 3, -1
2
10015, 3, 1, 10016, 3, -1
2
10016, 3, 1, 10017, 3, -1
2
10017, 3, 1, 10018, 3, -1
2
10018, 3, 1, 10019, 3, -1
2
10019, 3, 1, 10020, 3, -1
2
10020, 3, 1, 10021, 3, -1
2
10021, 3, 1, 10022, 3, -1
2
10022, 3, 1, 10023, 3, -1
2
10023, 3, 1, 10024, 3, -1
2
10024, 3, 1, 10025, 3, -1
2
10025, 3, 1, 10026, 3, -1
2
10026, 3, 1, 10027, 3, -1
2
10027, 3, 1, 10028, 3, -1
2
10028, 3, 1, 10029, 3, -1
2
10029, 3, 1, 10030, 3, -1
2
10030, 3, 1, 10031, 3, -1
2
10031, 3, 1, 10032, 3, -1
2
10032, 3, 1, 10033, 3, -1
2
10033, 3, 1, 10034, 3, -1
2
10034, 3, 1, 10035, 3, -1
2
10035, 3, 1, 10036, 3, -1
2
10036, 3, 1, 10037, 3, -1
2
10037, 3, 1, 10038, 3, -1
2
10038, 3, 1, 10039, 3, -1
2
10039, 3, 1, 10040, 3, -1
2
10040, 3, 1, 10041, 3, -1
2
10041, 3, 1, 10042, 3, -1
2
10042, 3, 1, 10043, 3, -1
2
10043, 3, 1, 10044, 3, -1
2
10044, 3, 1, 10045, 3, -1
2
10045, 3, 1, 10046, 3, -1
2
10046, 3, 1, 10047, 3, -1
2
10047, 3, 1, 10048, 3, -1
2
10048, 3, 1, 10049, 3, -1
2
10049, 3, 1, 10050, 3, -1
2
10050, 3, 1, 10051, 3, -1
2
10051, 3, 1, 10052, 3, -1
2
10052, 3, 1, 10053, 3, -1
2
10053, 3, 1, 10054, 3, -1
2
10054, 3, 1, 10055, 3, -1
2
10055, 3, 1, 10056, 3, -1
2
10056, 3, 1, 10057, 3, -1
2
10057, 3, 1, 10058, 3, -1
2
10058, 3, 1, 10059, 3, -1
2
10059, 3, 1, 10060, 3, -1
2
10060, 3, 1, 10061, 3, -1
2
10061, 3, 1, 10062, 3, -1
2
10062, 3, 1, 10063, 3, -1
2
10063, 3, 1, 10064, 3, -1
2
10064, 3, 1, 10065, 3, -1
2
10065, 3, 1, 10066, 3, -1
2
10066, 3, 1, 10067, 3, -1
2
10067, 3, 1, 10068, 3, -1
2
10068, 3, 1, 10069, 3, -1
2
10069, 3, 1, 10070, 3, -1
2
10070, 3, 1, 10071, 3, -1
2
10071, 3, 1, 10072, 3, -1
**
**
***********   AXIAL LOADING    ************
**            axial=2801.232 kN
********************************************
*NSET, GENERATE, NSET=END2TWO
10001, 10071, 2
*NSET, GENERATE, NSET=END2FOUR
10002, 10072, 2
*NSET, GENERATE, NSET=END1TWO
1, 71, 2
*NSET, GENERATE, NSET=END1FOUR
2, 72, 2
**
**
*STEP, NLGEOM, AMPLITUDE=STEP
*STATIC
*CLOAD
END2TWO, 3, -25937.33
*CLOAD
END2FOUR, 3, -51874.66
*CLOAD
END1TWO, 3, 25937.33
*CLOAD
END1FOUR, 3, 51874.66
**
**
*RESTART, WRITE, FREQUENCY=1, OVERLAY
*MONITOR, DOF=2, NODE=3601
*EL PRINT, FREQUENCY=1
SF
S
*EL PRINT
MISES
*NODE PRINT, SUMMARY=NO, TOTALS=YES, FREQUENCY=1
*NODE PRINT
U
*END STEP
***********   MOMENT LOADING   ************
**           moment=1 kNm
*******************************************
*STEP, NLGEOM, INC=25
*STATIC, RIKS
0.1, 0.1, 0.0000001
**
**
*CLOAD, FOLLOWER
23601, 1, 3571
*CLOAD, FOLLOWER
26401, 1, -3571
**
**
*RESTART, WRITE, FREQUENCY=1, OVERLAY
*MONITOR, DOF=1, NODE=3601
*EL PRINT, FREQUENCY=1
SF
S
*EL PRINT
MISES
*NODE PRINT, SUMMARY=NO, TOTALS=YES, FREQUENCY=1
*NODE PRINT
U
*END STEP
**
**
***********   EOP   ************
**
**
